Run Start Date:  29/08/2019
Run Start Time: 15:36:40.10
Run Stop Date:   29/08/2019
Run Stop Time:  15:43:20.43

********************                            CONTROL STREAM                                      ********************

$PROB    ORAL1_1CPT_KAVCL MULTIPLE DOSE FOCEI (120 Ind/4674 Obs) runODE024
$INPUT   ID TIME DV LNDV MDV AMT EVID DOSE VI CLI KAI SSX IIX SD CMT
$DATA    ORAL_1CPT.csv IGNORE=@ IGNORE (SD.EQ.1)
$SUBR    ADVAN13 TOL=6
$MODEL
         COMP=(ABS,DEFDOSE)
         COMP=(CENTRAL,DEFOBS)
$PK
         CL=EXP(THETA(1)+ETA(1))
         V =EXP(THETA(2)+ETA(2))
         KA=EXP(THETA(3)+ETA(3))
         S2=V
$DES
         DADT(1)= -KA*A(1)
         DADT(2)=  KA*A(1)-CL*(A(2)/V)
$ERROR
         IPRED = F
         RESCV = THETA(4)
         W     = IPRED*RESCV
         IRES  = DV-IPRED
         IWRES = IRES/W
         Y     = IPRED+W*EPS(1)
$THETA   1.6       ;log Cl
$THETA   4.5       ;log Vc
$THETA   0.2       ;log KA
$THETA   (0,0.3,1) ;RSV
$OMEGA   0.15 0.15 0.15
$SIGMA   1 FIX
$EST     NSIG=2 SIGL=6 PRINT=5 MAX=9999 NOABORT POSTHOC METHOD=COND INTER NOOBT
$COV
$TABLE  ID TIME LNDV MDV AMT EVID DOSE VI CLI CL V ETA1 ETA2 ETA3
        IPRED IRES IWRES CWRESI
        ONEHEADER NOPRINT FILE=runODE024.csv

********************                            SYSTEM INFORMATION                                  ********************

Operating system:

Microsoft Windows [Version 10.0.18362.295]

Compiler: Intel(R) Parallel Studio XE 2015 Update 3 Composer Edition (package 208)

Compiler settings: /Gs /nologo /nbs /w /fp:strict

********************                            NMTRAN MESSAGES                                     ********************

 WARNINGS AND ERRORS (IF ANY) FOR PROBLEM    1
 (WARNING  2) NM-TRAN INFERS THAT THE DATA ARE POPULATION.
********************                            NONMEM EXECUTION                                    ********************

1NONLINEAR MIXED EFFECTS MODEL PROGRAM (NONMEM) VERSION 7.4.3
 ORIGINALLY DEVELOPED BY STUART BEAL, LEWIS SHEINER, AND ALISON BOECKMANN
 CURRENT DEVELOPERS ARE ROBERT BAUER, ICON DEVELOPMENT SOLUTIONS,
 AND ALISON BOECKMANN. IMPLEMENTATION, EFFICIENCY, AND STANDARDIZATION
 PERFORMED BY NOUS INFOSYSTEMS.
 PROBLEM NO.:         1
 ORAL1_1CPT_KAVCL MULTIPLE DOSE FOCEI (120 Ind/4674 Obs) runODE024
 TOT. NO. OF OBS RECS:     4674
 TOT. NO. OF INDIVIDUALS:      120
 GENERAL NONLINEAR KINETICS MODEL WITH STIFF/NONSTIFF EQUATIONS (LSODA, ADVAN13)
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 #TBLN:      1
 #METH: First Order Conditional Estimation with Interaction
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
 #TERM:
0MINIMIZATION SUCCESSFUL
 HOWEVER, PROBLEMS OCCURRED WITH THE MINIMIZATION.
 REGARD THE RESULTS OF THE ESTIMATION STEP CAREFULLY, AND ACCEPT THEM ONLY
 AFTER CHECKING THAT THE COVARIANCE STEP PRODUCES REASONABLE OUTPUT.
 NO. OF FUNCTION EVALUATIONS USED:      352
 NO. OF SIG. DIGITS IN FINAL EST.:  2.2

 ETABAR IS THE ARITHMETIC MEAN OF THE ETA-ESTIMATES,
 AND THE P-VALUE IS GIVEN FOR THE NULL HYPOTHESIS THAT THE TRUE MEAN IS 0.

 ETABAR:        -9.7365E-04 -3.4550E-03 -4.6428E-03
 SE:             2.4045E-02  2.5080E-02  2.8494E-02
 N:                     120         120         120

 P VAL.:         9.6770E-01  8.9043E-01  8.7056E-01

 ETASHRINKSD(%)  4.9417E-01  2.2425E+00  1.3045E+01
 ETASHRINKVR(%)  9.8591E-01  4.4347E+00  2.4387E+01
 EBVSHRINKSD(%)  8.7491E-01  2.3943E+00  1.3208E+01
 EBVSHRINKVR(%)  1.7422E+00  4.7312E+00  2.4671E+01
 EPSSHRINKSD(%)  3.2390E+00
 EPSSHRINKVR(%)  6.3731E+00


 TOTAL DATA POINTS NORMALLY DISTRIBUTED (N):         4674
 N*LOG(2PI) CONSTANT TO OBJECTIVE FUNCTION:    8590.23740839728
 OBJECTIVE FUNCTION VALUE WITHOUT CONSTANT:    43707.1169126168
 OBJECTIVE FUNCTION VALUE WITH CONSTANT:       52297.3543210141
 REPORTED OBJECTIVE FUNCTION DOES NOT CONTAIN CONSTANT

 TOTAL EFFECTIVE ETAS (NIND*NETA):                           360


 #TERE:
 Elapsed estimation  time in seconds:   316.88
 Elapsed covariance  time in seconds:    71.96
 Elapsed postprocess time in seconds:     1.59

 ********************               FIRST ORDER CONDITIONAL ESTIMATION WITH INTERACTION              ********************
 #OBJT:**************                       MINIMUM VALUE OF OBJECTIVE FUNCTION                      ********************
 #OBJV:********************************************    43707.117       **************************************************

 ********************               FIRST ORDER CONDITIONAL ESTIMATION WITH INTERACTION              ********************
 ********************                             FINAL PARAMETER ESTIMATE                           ********************

 THETA - VECTOR OF FIXED EFFECTS PARAMETERS   *********
         TH 1      TH 2      TH 3      TH 4
         1.39E+00  4.21E+00 -9.38E-03  1.97E-01

 OMEGA - COV MATRIX FOR RANDOM EFFECTS - ETAS  ********
         ETA1      ETA2      ETA3
 ETA1
+        7.07E-02
 ETA2
+        0.00E+00  7.96E-02
 ETA3
+        0.00E+00  0.00E+00  1.30E-01

 SIGMA - COV MATRIX FOR RANDOM EFFECTS - EPSILONS  ****
         EPS1
 EPS1
+        1.00E+00

 OMEGA - CORR MATRIX FOR RANDOM EFFECTS - ETAS  *******
         ETA1      ETA2      ETA3
 ETA1
+        2.66E-01
 ETA2
+        0.00E+00  2.82E-01
 ETA3
+        0.00E+00  0.00E+00  3.60E-01

 SIGMA - CORR MATRIX FOR RANDOM EFFECTS - EPSILONS  ***
         EPS1
 EPS1
+        1.00E+00

 ********************               FIRST ORDER CONDITIONAL ESTIMATION WITH INTERACTION              ********************
 ********************                            STANDARD ERROR OF ESTIMATE                          ********************

 THETA - VECTOR OF FIXED EFFECTS PARAMETERS   *********
         TH 1      TH 2      TH 3      TH 4
         2.44E-02  2.65E-02  3.82E-02  1.86E-03

 OMEGA - COV MATRIX FOR RANDOM EFFECTS - ETAS  ********
         ETA1      ETA2      ETA3
 ETA1
+        7.38E-03
 ETA2
+       .........  1.04E-02
 ETA3
+       ......... .........  2.18E-02

 SIGMA - COV MATRIX FOR RANDOM EFFECTS - EPSILONS  ****
         EPS1
 EPS1
+       .........

 OMEGA - CORR MATRIX FOR RANDOM EFFECTS - ETAS  *******
         ETA1      ETA2      ETA3
 ETA1
+        1.39E-02
 ETA2
+       .........  1.84E-02
 ETA3
+       ......... .........  3.02E-02

 SIGMA - CORR MATRIX FOR RANDOM EFFECTS - EPSILONS  ***
         EPS1
 EPS1
+       .........

 ********************               FIRST ORDER CONDITIONAL ESTIMATION WITH INTERACTION              ********************
 ********************                          COVARIANCE MATRIX OF ESTIMATE                         ********************

            TH 1      TH 2      TH 3      TH 4      OM11      OM12      OM13      OM22      OM23      OM33      SG11
 TH 1
+        5.95E-04
 TH 2
+        1.90E-05  7.02E-04
 TH 3
+        3.68E-06  3.45E-05  1.46E-03
 TH 4
+       -5.91E-06 -1.45E-06  5.07E-06  3.45E-06
 OM11
+       -1.14E-05 -2.61E-05  1.82E-05 -2.00E-06  5.44E-05
 OM12
+       ......... ......... ......... ......... ......... .........
 OM13
+       ......... ......... ......... ......... ......... ......... .........
 OM22
+        2.55E-05  4.75E-05 -1.95E-05  1.79E-06 -7.57E-06 ......... .........  1.08E-04
 OM23
+       ......... ......... ......... ......... ......... ......... ......... ......... .........
 OM33
+       -2.18E-05 -6.04E-05  1.87E-04  1.35E-06  1.29E-05 ......... ......... -3.84E-06 .........  4.74E-04
 SG11
+       ......... ......... ......... ......... ......... ......... ......... ......... ......... ......... .........

 ********************               FIRST ORDER CONDITIONAL ESTIMATION WITH INTERACTION              ********************
 ********************                          CORRELATION MATRIX OF ESTIMATE                        ********************

            TH 1      TH 2      TH 3      TH 4      OM11      OM12      OM13      OM22      OM23      OM33      SG11
 TH 1
+        2.44E-02
 TH 2
+        2.94E-02  2.65E-02
 TH 3
+        3.95E-03  3.41E-02  3.82E-02
 TH 4
+       -1.30E-01 -2.95E-02  7.13E-02  1.86E-03
 OM11
+       -6.33E-02 -1.34E-01  6.44E-02 -1.46E-01  7.38E-03
 OM12
+       ......... ......... ......... ......... ......... .........
 OM13
+       ......... ......... ......... ......... ......... ......... .........
 OM22
+        1.00E-01  1.72E-01 -4.91E-02  9.24E-02 -9.88E-02 ......... .........  1.04E-02
 OM23
+       ......... ......... ......... ......... ......... ......... ......... ......... .........
 OM33
+       -4.11E-02 -1.05E-01  2.25E-01  3.33E-02  8.05E-02 ......... ......... -1.70E-02 .........  2.18E-02
 SG11
+       ......... ......... ......... ......... ......... ......... ......... ......... ......... ......... .........
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 Elapsed finaloutput time in seconds:     0.36
 #CPUT: Total CPU Time in Seconds,      392.125
