Run Start Date:  29/08/2019
Run Start Time: 16:41:52.47
Run Stop Date:   29/08/2019
Run Stop Time:  16:47:11.51

********************                            CONTROL STREAM                                      ********************

$PROB    BOLUS_2CPT_CLV1QV2 MULTIPLE DOSE FOCEI (120 Ind/4680 Obs) runODE033
$INPUT   ID TIME DV LNDV MDV AMT EVID DOSE V1I CLI QI V2I SSX IIX SD CMT
$DATA    BOLUS_2CPT.csv IGNORE=@ IGNORE (SD.EQ.1)
$SUBR    ADVAN13 TOL=6
$MODEL
         COMP=(CENTRAL,DEFOBS,DEFDOSE)
         COMP=(PERI)
$PK
         CL=EXP(THETA(1)+ETA(1))
         V=EXP(THETA(2)+ETA(2))
         Q=EXP(THETA(3)+ETA(3))
         V2=EXP(THETA(4)+ETA(4))
         V1=V
         S1=V
		 K21=Q/V2
		 K12=Q/V
$DES
         DADT(1)= K21*A(2)-K12*A(1)-CL*A(1)/V1
         DADT(2)=-K21*A(2)+K12*A(1)
$ERROR
         IPRED = F
         RESCV = THETA(5)
         W     = IPRED*RESCV
         IRES  = DV-IPRED
         IWRES = IRES/W
         Y     = IPRED+W*EPS(1)
$THETA   1.6       ;log Cl
$THETA   4.5       ;log Vc
$THETA   1.4       ;log Q
$THETA   3.9       ;log Vp
$THETA   (0,0.3,1) ;RSV
$OMEGA   0.15 0.15 0.15 0.15
$SIGMA   1 FIX
$EST     NSIG=2 SIGL=6 PRINT=5 MAX=9999 NOABORT POSTHOC METHOD=COND INTER NOOBT
$COV
$TABLE  ID TIME LNDV MDV AMT EVID DOSE V1I CLI QI V2I CL V Q V2 ETA1 ETA2 ETA3 ETA4
        IPRED IRES IWRES CWRESI
        ONEHEADER NOPRINT FILE=runODE033.csv

********************                            SYSTEM INFORMATION                                  ********************

Operating system:

Microsoft Windows [Version 10.0.18362.295]

Compiler: Intel(R) Parallel Studio XE 2015 Update 3 Composer Edition (package 208)

Compiler settings: /Gs /nologo /nbs /w /fp:strict

********************                            NMTRAN MESSAGES                                     ********************

 WARNINGS AND ERRORS (IF ANY) FOR PROBLEM    1
 (WARNING  2) NM-TRAN INFERS THAT THE DATA ARE POPULATION.
********************                            NONMEM EXECUTION                                    ********************

1NONLINEAR MIXED EFFECTS MODEL PROGRAM (NONMEM) VERSION 7.4.3
 ORIGINALLY DEVELOPED BY STUART BEAL, LEWIS SHEINER, AND ALISON BOECKMANN
 CURRENT DEVELOPERS ARE ROBERT BAUER, ICON DEVELOPMENT SOLUTIONS,
 AND ALISON BOECKMANN. IMPLEMENTATION, EFFICIENCY, AND STANDARDIZATION
 PERFORMED BY NOUS INFOSYSTEMS.
 PROBLEM NO.:         1
 BOLUS_2CPT_CLV1QV2 MULTIPLE DOSE FOCEI (120 Ind/4680 Obs) runODE033
 TOT. NO. OF OBS RECS:     4680
 TOT. NO. OF INDIVIDUALS:      120
 GENERAL NONLINEAR KINETICS MODEL WITH STIFF/NONSTIFF EQUATIONS (LSODA, ADVAN13)
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 #TBLN:      1
 #METH: First Order Conditional Estimation with Interaction
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
 #TERM:
0MINIMIZATION SUCCESSFUL
 HOWEVER, PROBLEMS OCCURRED WITH THE MINIMIZATION.
 REGARD THE RESULTS OF THE ESTIMATION STEP CAREFULLY, AND ACCEPT THEM ONLY
 AFTER CHECKING THAT THE COVARIANCE STEP PRODUCES REASONABLE OUTPUT.
 NO. OF FUNCTION EVALUATIONS USED:      355
 NO. OF SIG. DIGITS IN FINAL EST.:  2.3

 ETABAR IS THE ARITHMETIC MEAN OF THE ETA-ESTIMATES,
 AND THE P-VALUE IS GIVEN FOR THE NULL HYPOTHESIS THAT THE TRUE MEAN IS 0.

 ETABAR:         1.0558E-03 -8.3550E-03  6.6726E-03  6.7503E-03
 SE:             3.0952E-02  2.7084E-02  2.0265E-02  1.8259E-02
 N:                     120         120         120         120

 P VAL.:         9.7279E-01  7.5772E-01  7.4196E-01  7.1161E-01

 ETASHRINKSD(%)  2.4929E-01  3.5598E+00  4.1290E+01  2.3140E+01
 ETASHRINKVR(%)  4.9796E-01  6.9928E+00  6.5531E+01  4.0926E+01
 EBVSHRINKSD(%)  5.1602E-01  3.8986E+00  4.0379E+01  2.3332E+01
 EBVSHRINKVR(%)  1.0294E+00  7.6453E+00  6.4454E+01  4.1220E+01
 EPSSHRINKSD(%)  3.4260E+00
 EPSSHRINKVR(%)  6.7347E+00


 TOTAL DATA POINTS NORMALLY DISTRIBUTED (N):         4680
 N*LOG(2PI) CONSTANT TO OBJECTIVE FUNCTION:    8601.26467079574
 OBJECTIVE FUNCTION VALUE WITHOUT CONSTANT:    46377.3479897405
 OBJECTIVE FUNCTION VALUE WITH CONSTANT:       54978.6126605362
 REPORTED OBJECTIVE FUNCTION DOES NOT CONTAIN CONSTANT

 TOTAL EFFECTIVE ETAS (NIND*NETA):                           480


 #TERE:
 Elapsed estimation  time in seconds:   229.28
 Elapsed covariance  time in seconds:    78.77
 Elapsed postprocess time in seconds:     1.20

 ********************               FIRST ORDER CONDITIONAL ESTIMATION WITH INTERACTION              ********************
 #OBJT:**************                       MINIMUM VALUE OF OBJECTIVE FUNCTION                      ********************
 #OBJV:********************************************    46377.348       **************************************************

 ********************               FIRST ORDER CONDITIONAL ESTIMATION WITH INTERACTION              ********************
 ********************                             FINAL PARAMETER ESTIMATE                           ********************

 THETA - VECTOR OF FIXED EFFECTS PARAMETERS   *********
         TH 1      TH 2      TH 3      TH 4      TH 5
         1.34E+00  4.18E+00  1.47E+00  3.84E+00  2.03E-01

 OMEGA - COV MATRIX FOR RANDOM EFFECTS - ETAS  ********
         ETA1      ETA2      ETA3      ETA4
 ETA1
+        1.17E-01
 ETA2
+        0.00E+00  9.54E-02
 ETA3
+        0.00E+00  0.00E+00  1.44E-01
 ETA4
+        0.00E+00  0.00E+00  0.00E+00  6.83E-02

 SIGMA - COV MATRIX FOR RANDOM EFFECTS - EPSILONS  ****
         EPS1
 EPS1
+        1.00E+00

 OMEGA - CORR MATRIX FOR RANDOM EFFECTS - ETAS  *******
         ETA1      ETA2      ETA3      ETA4
 ETA1
+        3.41E-01
 ETA2
+        0.00E+00  3.09E-01
 ETA3
+        0.00E+00  0.00E+00  3.80E-01
 ETA4
+        0.00E+00  0.00E+00  0.00E+00  2.61E-01

 SIGMA - CORR MATRIX FOR RANDOM EFFECTS - EPSILONS  ***
         EPS1
 EPS1
+        1.00E+00

 ********************               FIRST ORDER CONDITIONAL ESTIMATION WITH INTERACTION              ********************
 ********************                            STANDARD ERROR OF ESTIMATE                          ********************

 THETA - VECTOR OF FIXED EFFECTS PARAMETERS   *********
         TH 1      TH 2      TH 3      TH 4      TH 5
         3.10E-02  2.97E-02  7.74E-02  3.48E-02  2.12E-03

 OMEGA - COV MATRIX FOR RANDOM EFFECTS - ETAS  ********
         ETA1      ETA2      ETA3      ETA4
 ETA1
+        1.54E-02
 ETA2
+       .........  1.19E-02
 ETA3
+       ......... .........  6.10E-02
 ETA4
+       ......... ......... .........  1.48E-02

 SIGMA - COV MATRIX FOR RANDOM EFFECTS - EPSILONS  ****
         EPS1
 EPS1
+       .........

 OMEGA - CORR MATRIX FOR RANDOM EFFECTS - ETAS  *******
         ETA1      ETA2      ETA3      ETA4
 ETA1
+        2.26E-02
 ETA2
+       .........  1.92E-02
 ETA3
+       ......... .........  8.04E-02
 ETA4
+       ......... ......... .........  2.82E-02

 SIGMA - CORR MATRIX FOR RANDOM EFFECTS - EPSILONS  ***
         EPS1
 EPS1
+       .........

 ********************               FIRST ORDER CONDITIONAL ESTIMATION WITH INTERACTION              ********************
 ********************                          COVARIANCE MATRIX OF ESTIMATE                         ********************

            TH 1      TH 2      TH 3      TH 4      TH 5      OM11      OM12      OM13      OM14      OM22      OM23      OM24
             OM33      OM34      OM44      SG11
 TH 1
+        9.61E-04
 TH 2
+       -1.13E-04  8.82E-04
 TH 3
+       -2.81E-04 -1.36E-04  5.99E-03
 TH 4
+        6.09E-05 -2.40E-04  1.18E-03  1.21E-03
 TH 5
+       -7.02E-06  3.01E-07 -1.92E-05 -1.51E-05  4.48E-06
 OM11
+       -1.03E-04  2.75E-05 -1.86E-04  1.11E-05  5.11E-06  2.38E-04
 OM12
+       ......... ......... ......... ......... ......... ......... .........
 OM13
+       ......... ......... ......... ......... ......... ......... ......... .........
 OM14
+       ......... ......... ......... ......... ......... ......... ......... ......... .........
 OM22
+       -2.92E-05  4.42E-05 -1.86E-04 -8.19E-05  2.91E-06 -2.38E-05 ......... ......... .........  1.41E-04
 OM23
+       ......... ......... ......... ......... ......... ......... ......... ......... ......... ......... .........
 OM24
+       ......... ......... ......... ......... ......... ......... ......... ......... ......... ......... ......... .........
 OM33
+       -1.22E-04 -7.48E-05  1.99E-03  5.40E-04 -2.20E-05 -9.08E-05 ......... ......... ......... -1.02E-04 ......... .........
          3.73E-03
 OM34
+       ......... ......... ......... ......... ......... ......... ......... ......... ......... ......... ......... .........
         ......... .........
 OM44
+       -4.57E-06  3.15E-05 -5.40E-05 -5.53E-05  7.74E-07  2.61E-05 ......... ......... ......... -7.37E-06 ......... .........
          9.71E-05 .........  2.18E-04
 SG11
+       ......... ......... ......... ......... ......... ......... ......... ......... ......... ......... ......... .........
         ......... ......... ......... .........

 ********************               FIRST ORDER CONDITIONAL ESTIMATION WITH INTERACTION              ********************
 ********************                          CORRELATION MATRIX OF ESTIMATE                        ********************

            TH 1      TH 2      TH 3      TH 4      TH 5      OM11      OM12      OM13      OM14      OM22      OM23      OM24
             OM33      OM34      OM44      SG11
 TH 1
+        3.10E-02
 TH 2
+       -1.23E-01  2.97E-02
 TH 3
+       -1.17E-01 -5.93E-02  7.74E-02
 TH 4
+        5.63E-02 -2.32E-01  4.36E-01  3.48E-02
 TH 5
+       -1.07E-01  4.79E-03 -1.17E-01 -2.05E-01  2.12E-03
 OM11
+       -2.14E-01  5.99E-02 -1.56E-01  2.07E-02  1.57E-01  1.54E-02
 OM12
+       ......... ......... ......... ......... ......... ......... .........
 OM13
+       ......... ......... ......... ......... ......... ......... ......... .........
 OM14
+       ......... ......... ......... ......... ......... ......... ......... ......... .........
 OM22
+       -7.94E-02  1.26E-01 -2.02E-01 -1.98E-01  1.16E-01 -1.30E-01 ......... ......... .........  1.19E-02
 OM23
+       ......... ......... ......... ......... ......... ......... ......... ......... ......... ......... .........
 OM24
+       ......... ......... ......... ......... ......... ......... ......... ......... ......... ......... ......... .........
 OM33
+       -6.43E-02 -4.13E-02  4.21E-01  2.54E-01 -1.70E-01 -9.64E-02 ......... ......... ......... -1.41E-01 ......... .........
          6.10E-02
 OM34
+       ......... ......... ......... ......... ......... ......... ......... ......... ......... ......... ......... .........
         ......... .........
 OM44
+       -9.98E-03  7.18E-02 -4.73E-02 -1.08E-01  2.48E-02  1.14E-01 ......... ......... ......... -4.21E-02 ......... .........
          1.08E-01 .........  1.48E-02
 SG11
+       ......... ......... ......... ......... ......... ......... ......... ......... ......... ......... ......... .........
         ......... ......... ......... .........
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 Elapsed finaloutput time in seconds:     0.41
 #CPUT: Total CPU Time in Seconds,      310.703
