Run Start Date:  29/08/2019
Run Start Time: 21:33:54.65
Run Stop Date:   29/08/2019
Run Stop Time:  23:24:29.79

********************                            CONTROL STREAM                                      ********************

$PROB    ORAL1_2CPT_KAV1QV2VMKM MULTIPLE DOSE FOCEI (120 Ind/2280 Obs) runODE069
$INPUT   ID TIME DV LNDV MDV AMT EVID DOSE VI VMI KMI QI V2I KAI SD CMT
$DATA    ORAL_2CPTMM.csv IGNORE=@ IGNORE(SD.EQ.1)
$SUBR    ADVAN13 TOL=6
$MODEL
         COMP=(ABS,DEFDOSE)
         COMP=(CENTRAL,DEFOBS)
         COMP=(PERI)
$PK
         VM=EXP(THETA(1)+ETA(1))
         KM=EXP(THETA(2)+ETA(2))
         V2=EXP(THETA(3)+ETA(3))
         Q =EXP(THETA(4)+ETA(4))
         V3=EXP(THETA(5)+ETA(5))
         K12=EXP(THETA(6)+ETA(6))
         K23=Q/V2
         K32=Q/V3
         S2=V2
$DES
         C2     =  A(2)/V2
         DADT(1)= -K12*A(1)
         DADT(2)=  K12*A(1)+K32*A(3)-K23*A(2)-VM*C2/(KM+C2)
         DADT(3)=         -K32*A(3)+K23*A(2)
$ERROR
         IPRED = F
         RESCV = THETA(7)
         W     = IPRED*RESCV
         IRES  = DV-IPRED
         IWRES = IRES/W
         Y     = IPRED+W*EPS(1)

$THETA   7.1       ;log VM
$THETA   5.7       ;log KM
$THETA   4.5       ;log Vc
$THETA   1.6       ;log Q
$THETA   4.1       ;log Vp
$THETA   0.22      ;log KA
$THETA   (0,0.3,1) ;RSV
$OMEGA   0.15 0.15 0.15 0.15 0.15 0.15
$SIGMA   1 FIX
$EST     NSIG=2 SIGL=6 PRINT=5 MAX=9999 NOABORT POSTHOC METHOD=COND INTER NOOBT
$COV
$TABLE  ID TIME LNDV MDV AMT EVID DOSE VI VMI KMI V2I V2 VM KM Q V3 K12 ETA1 ETA2 ETA3 ETA4 ETA5 ETA6
        IPRED IRES IWRES CWRESI
        ONEHEADER NOPRINT FILE=runODE069.csv

********************                            SYSTEM INFORMATION                                  ********************

Operating system:

Microsoft Windows [Version 10.0.18362.295]

Compiler: Intel(R) Parallel Studio XE 2015 Update 3 Composer Edition (package 208)

Compiler settings: /Gs /nologo /nbs /w /fp:strict

********************                            NMTRAN MESSAGES                                     ********************

 WARNINGS AND ERRORS (IF ANY) FOR PROBLEM    1
 (WARNING  2) NM-TRAN INFERS THAT THE DATA ARE POPULATION.
********************                            NONMEM EXECUTION                                    ********************

1NONLINEAR MIXED EFFECTS MODEL PROGRAM (NONMEM) VERSION 7.4.3
 ORIGINALLY DEVELOPED BY STUART BEAL, LEWIS SHEINER, AND ALISON BOECKMANN
 CURRENT DEVELOPERS ARE ROBERT BAUER, ICON DEVELOPMENT SOLUTIONS,
 AND ALISON BOECKMANN. IMPLEMENTATION, EFFICIENCY, AND STANDARDIZATION
 PERFORMED BY NOUS INFOSYSTEMS.
 PROBLEM NO.:         1
 ORAL1_2CPT_KAV1QV2VMKM MULTIPLE DOSE FOCEI (120 Ind/2280 Obs) runODE069
 TOT. NO. OF OBS RECS:     4680
 TOT. NO. OF INDIVIDUALS:      120
 GENERAL NONLINEAR KINETICS MODEL WITH STIFF/NONSTIFF EQUATIONS (LSODA, ADVAN13)
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 #TBLN:      1
 #METH: First Order Conditional Estimation with Interaction
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
 #TERM:
0MINIMIZATION SUCCESSFUL
 HOWEVER, PROBLEMS OCCURRED WITH THE MINIMIZATION.
 REGARD THE RESULTS OF THE ESTIMATION STEP CAREFULLY, AND ACCEPT THEM ONLY
 AFTER CHECKING THAT THE COVARIANCE STEP PRODUCES REASONABLE OUTPUT.
 NO. OF FUNCTION EVALUATIONS USED:     2310
 NO. OF SIG. DIGITS IN FINAL EST.:  2.3

 ETABAR IS THE ARITHMETIC MEAN OF THE ETA-ESTIMATES,
 AND THE P-VALUE IS GIVEN FOR THE NULL HYPOTHESIS THAT THE TRUE MEAN IS 0.

 ETABAR:         6.9304E-03 -2.2323E-02 -2.0340E-02 -1.3585E-03  8.3360E-03 -1.1124E-02
 SE:             1.8064E-02  2.4282E-02  2.5023E-02  2.9882E-02  1.0992E-02  2.0658E-02
 N:                     120         120         120         120         120         120

 P VAL.:         7.0124E-01  3.5792E-01  4.1631E-01  9.6374E-01  4.4825E-01  5.9025E-01

 ETASHRINKSD(%)  2.9661E+01  4.0219E+01  8.1183E+00  4.4221E+01  5.5732E+01  3.7459E+01
 ETASHRINKVR(%)  5.0524E+01  6.4262E+01  1.5577E+01  6.8887E+01  8.0403E+01  6.0887E+01
 EBVSHRINKSD(%)  2.7993E+01  4.1350E+01  9.5356E+00  4.5709E+01  5.5821E+01  3.7549E+01
 EBVSHRINKVR(%)  4.8149E+01  6.5601E+01  1.8162E+01  7.0525E+01  8.0482E+01  6.0999E+01
 EPSSHRINKSD(%)  3.1078E+00
 EPSSHRINKVR(%)  6.1191E+00


 TOTAL DATA POINTS NORMALLY DISTRIBUTED (N):         4680
 N*LOG(2PI) CONSTANT TO OBJECTIVE FUNCTION:    8601.26467079574
 OBJECTIVE FUNCTION VALUE WITHOUT CONSTANT:    50862.0215661216
 OBJECTIVE FUNCTION VALUE WITH CONSTANT:       59463.2862369173
 REPORTED OBJECTIVE FUNCTION DOES NOT CONTAIN CONSTANT

 TOTAL EFFECTIVE ETAS (NIND*NETA):                           720


 #TERE:
 Elapsed estimation  time in seconds:  6125.71
 Elapsed covariance  time in seconds:   493.17
 Elapsed postprocess time in seconds:     3.99

 ********************               FIRST ORDER CONDITIONAL ESTIMATION WITH INTERACTION              ********************
 #OBJT:**************                       MINIMUM VALUE OF OBJECTIVE FUNCTION                      ********************
 #OBJV:********************************************    50862.022       **************************************************

 ********************               FIRST ORDER CONDITIONAL ESTIMATION WITH INTERACTION              ********************
 ********************                             FINAL PARAMETER ESTIMATE                           ********************

 THETA - VECTOR OF FIXED EFFECTS PARAMETERS   *********
         TH 1      TH 2      TH 3      TH 4      TH 5      TH 6      TH 7
         7.07E+00  6.14E+00  4.35E+00  3.48E-01  3.73E+00  6.79E-02  2.02E-01

 OMEGA - COV MATRIX FOR RANDOM EFFECTS - ETAS  ********
         ETA1      ETA2      ETA3      ETA4      ETA5      ETA6
 ETA1
+        7.98E-02
 ETA2
+        0.00E+00  2.00E-01
 ETA3
+        0.00E+00  0.00E+00  8.97E-02
 ETA4
+        0.00E+00  0.00E+00  0.00E+00  3.47E-01
 ETA5
+        0.00E+00  0.00E+00  0.00E+00  0.00E+00  7.46E-02
 ETA6
+        0.00E+00  0.00E+00  0.00E+00  0.00E+00  0.00E+00  1.32E-01

 SIGMA - COV MATRIX FOR RANDOM EFFECTS - EPSILONS  ****
         EPS1
 EPS1
+        1.00E+00

 OMEGA - CORR MATRIX FOR RANDOM EFFECTS - ETAS  *******
         ETA1      ETA2      ETA3      ETA4      ETA5      ETA6
 ETA1
+        2.83E-01
 ETA2
+        0.00E+00  4.47E-01
 ETA3
+        0.00E+00  0.00E+00  3.00E-01
 ETA4
+        0.00E+00  0.00E+00  0.00E+00  5.89E-01
 ETA5
+        0.00E+00  0.00E+00  0.00E+00  0.00E+00  2.73E-01
 ETA6
+        0.00E+00  0.00E+00  0.00E+00  0.00E+00  0.00E+00  3.63E-01

 SIGMA - CORR MATRIX FOR RANDOM EFFECTS - EPSILONS  ***
         EPS1
 EPS1
+        1.00E+00

 ********************               FIRST ORDER CONDITIONAL ESTIMATION WITH INTERACTION              ********************
 ********************                            STANDARD ERROR OF ESTIMATE                          ********************

 THETA - VECTOR OF FIXED EFFECTS PARAMETERS   *********
         TH 1      TH 2      TH 3      TH 4      TH 5      TH 6      TH 7
         7.31E-02  1.32E-01  3.50E-02  1.07E-01  8.48E-02  5.86E-02  2.29E-03

 OMEGA - COV MATRIX FOR RANDOM EFFECTS - ETAS  ********
         ETA1      ETA2      ETA3      ETA4      ETA5      ETA6
 ETA1
+        2.61E-02
 ETA2
+       .........  8.00E-02
 ETA3
+       ......... .........  1.52E-02
 ETA4
+       ......... ......... .........  1.08E-01
 ETA5
+       ......... ......... ......... .........  3.07E-02
 ETA6
+       ......... ......... ......... ......... .........  4.85E-02

 SIGMA - COV MATRIX FOR RANDOM EFFECTS - EPSILONS  ****
         EPS1
 EPS1
+       .........

 OMEGA - CORR MATRIX FOR RANDOM EFFECTS - ETAS  *******
         ETA1      ETA2      ETA3      ETA4      ETA5      ETA6
 ETA1
+        4.63E-02
 ETA2
+       .........  8.96E-02
 ETA3
+       ......... .........  2.54E-02
 ETA4
+       ......... ......... .........  9.13E-02
 ETA5
+       ......... ......... ......... .........  5.61E-02
 ETA6
+       ......... ......... ......... ......... .........  6.68E-02

 SIGMA - CORR MATRIX FOR RANDOM EFFECTS - EPSILONS  ***
         EPS1
 EPS1
+       .........
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 Elapsed finaloutput time in seconds:     0.43
 #CPUT: Total CPU Time in Seconds,     6624.766
